// COMSOL Multiphysics 5.6.0.401 model "1cell.mph"
// Outline of the model tree

Parameters
  d = 15[nm]  // Diameter of particles
  boxLength = 400  // Number of columns of particles
  boxWidth = boxLength  // Number of rows of particles
  E0 = 1[V/m]
  S_in = E0^2/(2*Z0_const)*n_med
  n_med = 1.5
  lambda = 800[nm]  // Current wavelength
  f0 = c_const/lambda
  t_PML = 3*d
  height = 200[nm]  // Height of half the box
  h_offset = -2[nm]  // Height offset of gold particles
  boxScale = 1.3  // Scaling factor for the length and width of the box

Variables
  var1 "Variables 1"
    ofact = if(nx*x+ny*y+nz*z>=0,1,-1)
    onx = nx*ofact
    ony = ny*ofact
    onz = nz*ofact
    scPoav = emw.relPoavx*onx+emw.relPoavy*ony+emw.relPoavz*onz
    Poav = emw.Poavx*onx+emw.Poavy*ony+emw.Poavz*onz
    ACS = int_ACS(emw.Qrh)/S_in
    SCS = int_SCS(scPoav)/S_in
    ECS = ACS+SCS
    r = sqrt(x^2+y^2+z^2)

Selections
  box1: Box "Physical Domains" | entitydim = 3; xmin = -59; xmax = 459; ymin = -59; ymax = 459; zmin = -199; zmax = 199
  com1: Complement | entitydim = 3; input = {box1}
  adj1: Adjacent | entitydim = 3; input = {box1, com1}; outputdim = 2
  adj2: Adjacent | entitydim = 3; input = {box1}; outputdim = 2
  dif1: Difference | entitydim = 3
  box2: Box | entitydim = 1; xmax = -60; ymax = -60; zmin = 244; zmax = 247; condition = inside
  box3: Box | entitydim = 1; xmin = 459; ymin = 459; zmin = 244; zmax = 247; condition = inside
  box4: Box | entitydim = 2; zmin = 244; zmax = 247; condition = inside

Coordinate systems
  sys2: Spherical "Spherical System 2"

Geometry
  geom1 "Geometry 1" (3D, length unit µm)
    blk1: Block | base = center; size = {100, 2000, 3000}
    sph0: Sphere | contributeto = csel1; r = 10
    sph1: Sphere | contributeto = csel1; pos = {39.7431019125063, 242.401566603333, 1196.69155625615}; r = 10
    sph2: Sphere | contributeto = csel1; pos = {14.4982211443381, -19.9846001817333, 232.771505126821}; r = 10
    sph3: Sphere | contributeto = csel1; pos = {38.5816210105474, 748.139865248432, 676.739731980872}; r = 10
    sph4: Sphere | contributeto = csel1; pos = {37.6462628796113, -148.562577747505, -154.252230097249}; r = 10
    sph5: Sphere | contributeto = csel1; pos = {32.8956034865852, -618.826184522751, 1193.08845393628}; r = 10
    sph6: Sphere | contributeto = csel1; pos = {-23.0614989413879, 939.396090854731, 903.511791463208}; r = 10
    sph7: Sphere | contributeto = csel1; pos = {-22.4033027237458, -263.046158088901, -673.339462603137}; r = 10
    sph8: Sphere | contributeto = csel1; pos = {-27.7783550929988, -310.868102548949, -1316.1661068099}; r = 10
    sph9: Sphere | contributeto = csel1; pos = {10.7487344663925, 801.345270222315, 583.066394991109}; r = 10
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    fin: Finalize "Form Union"

Physics
  br: Brinkman "Brinkman Equations" on domains 1
    dependent variable u = {u, v, w}
    ShapeProperty.order_fluid = 1
    PhysicalModelProperty.StokesFlowProp = 0
    fmp1: FluidAndMatrixProperties (default)
      rho_mat = userdef
      rho = 1000[kg/m^3]
      mu_mat = userdef
      mu = 1e-3[Pa*s]
      epsilon_p_mat = userdef
      epsilon_p = 1
      kappa_mat = userdef
      kappa = 1e-12[m^2]
    init1: init "Initial Values 1" (default)
    wallbc1: WallBC "Wall 1" (default)
    inl1: InletBoundary "Inlet 1" on boundaries 3 | ComponentWise = VelocityFieldComponentWise; u0 = {0, 0, 3e-6}
    out1: OutletBoundary "Outlet 1" on boundaries 4 | NormalFlow = 0
  tds: DilutedSpeciesInPorousMedia "Transport of Diluted Species in Porous Media" on domains 1
    dependent variable c
    TransportMechanism.MassTransferInPorousMedia = 0
    nflx1: NoFlux (default) | IncludeConvection = 1
    init1: init "Initial Values 1" (default)
    cdm1: ConvectionDiffusionMigration "Transport Properties 1" on domains 1
      DiffusionCoefficientSource = mat
      D_c = 145e-12[m^2/s]
      Dchem_c = 145e-12[m^2/s]
      minput_temperature_src = fromCommonDef
    fl1: FluxBoundary "Flux 1" on selection geom1_csel1_bnd
      IncludeConvection = 1
      FluxType = ExternalConvection
      species = 1
      kc = 1.45e-9
      cb = 8.33e-7
    in1: Inflow on boundaries 3 | BoundaryConditionType = ConcentrationConstraint
    out1: Outflow on boundaries 4

Multiphysics
  rfd1: ReactingFlowDS "Reacting Flow, Diluted Species 1" on all domains | Fluid_physics = br; Species_physics = tds

Mesh
  mesh1 "Mesh 1" (physics-controlled)

Studies
  std1 "Study 1"
    stat: Stationary

Solver configurations
  sol1 "Solution 1" (study std1)
    v1: Variables "Dependent Variables 1"
    s1: Stationary "Stationary Solver 1"
      se1: Segregated
        maxsegiter = 200
        segstabacc = segcflcmp
        subinitcfl = 2
        subkppid = 0.6
        subkdpid = 0.02
        subcfltol = 0.075
        ss1: SegregatedStep "Velocity u, Pressure p" | segvar = {comp1_u, comp1_p}; linsolver = i1; subdamp = 0.5
        ss2: SegregatedStep "Concentration c"
          segvar = {comp1_c}
          linsolver = i2
          subdamp = 0.35
          subtermconst = itertol
          subiter = 3
          subntolfact = 1
      i1: Iterative "AMG, fluid flow variables (br)" | nlinnormuse = on; maxlinit = 1000; rhob = 20
        mg1: Multigrid | prefun = saamg; maxcoarsedof = 80000; strconn = 0.02; saamgcompwise = on
      i2: Iterative "AMG, concentrations (tds)" | nlinnormuse = on; maxlinit = 1000
        mg1: Multigrid | prefun = saamg; maxcoarsedof = 50000; saamgcompwise = on

Datasets
  dset1: Solution | solution = sol1
  surf1: Surface "Exterior Walls" | data = dset1
  iso1: Isosurface | data = dset1; expr = sys2.r; levelmethod = levels; level = 10.0001
  surf2: Surface "Exterior Walls 1" | data = dset1

Plots
  pg1: PlotGroup3D "Velocity (br)" | data = dset1
    slc1: Slice | expr = br.U
  pg2: PlotGroup3D "Pressure (br)" | data = surf2
    surf1: Surface | expr = 1
    con1: Contour "Pressure" | expr = p; levelrounding = off
  pg3: PlotGroup3D "Concentration, Streamline (tds)" | data = dset1
    str1: Streamline | expr = {tds.tflux_cx, tds.tflux_cy, tds.tflux_cz}; pointtype = arrow; arrowlength = logarithmic
      col: Color "Color Expression" | expr = c
  pg4: PlotGroup3D "Concentration, Surface (tds)" | data = dset1; typeintitle = off
    surf1: Surface | expr = c

Exports
  data1: Data
    data = iso1
    expr = {sys2.phi, sys2.theta, c}
    descr = {"Coordinate, phi component", "Coordinate, theta component", Concentration}
    filename = C:\Users\log24\Dropbox\autologous3\dat\brinkman-transport3d.dat

Methods
  addParticles3D: CodeEditor
    public class addParticles3D extends ApplicationMethod {
      public void execute() {
        // Read in the sphere locations
        // The csv file should be in the format of x,y,r
        // The z coordinate is determined from r and the h_offset
        model.component("comp1").geom("geom1").feature().clear();
        model.component("comp1").geom("geom1").selection().clear();
        String[][] csvData = readCSVFile("upload:///sphere_coords");
        int rows = csvData.length;
        model.component("comp1").geom("geom1").create("blk1", "Block");
        model.component("comp1").geom("geom1").feature("blk1").set("size", new int[]{100, 2000, 3000});
        model.component("comp1").geom("geom1").feature("blk1").set("base", "center");
        model.component("comp1").geom("geom1").runPre("fin");
        model.component("comp1").geom("geom1").lengthUnit("um");
        model.component("comp1").geom("geom1").selection().create("csel1", "CumulativeSelection"); // Particles
        model.component("comp1").geom("geom1").selection("csel1").label("Particles");
        // Generate the spheres to be used
        for (int i = 0; i < rows; i++) {
          model.component("comp1").geom("geom1").create("sph"+i, "Sphere");
          model.component("comp1").geom("geom1").feature("sph"+i).set("r", 10);
          model.component("comp1").geom("geom1").feature("sph"+i).set("pos", new String[]{csvData[i][0], csvData[i][1], csvData[i][2]});
          model.component("comp1").geom("geom1").feature("sph"+i).set("contributeto", "csel1");
        }
        model.component("comp1").geom("geom1").run();
        model.component("comp1").physics("br").selection().set(1);
        model.component("comp1").physics("br").feature("inl1").selection().set(3);
        model.component("comp1").physics("br").feature("out1").selection().set(4);
        model.component("comp1").physics("tds").selection().set(1);
        model.component("comp1").physics("tds").feature("fl1").selection().named("geom1_csel1_bnd");
        model.component("comp1").physics("tds").feature("in1").selection().set(3);
        model.component("comp1").physics("tds").feature("cdm1").selection().set(1);
        model.component("comp1").physics("tds").feature("out1").selection().set(4);
        model.component("comp1").mesh().clearMeshes();
      }
    }